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/batch
! ANSYS input file written by Workbench version 16.0 RELEASE
! File used for geometry attach: E:\coding\ANSYS code\Chapter_8\Block_contact_8_3_files\dp0\Geom\DM\Geom.agdb
/title,Block_contact_8_3--Transient (B5)
/com,--- Data in consistent MKS units. See Solving Units in the help system for more information.
/units,MKS
/prep7
! Turn off shape checking because checks already performed inside WB mesher.
! See help system for more information.
SHPP,OFF,,NOWARN
etcon,set             ! allow ANSYS to choose best KEYOP's for 180x elements
/com,*********** Nodes for the whole assembly ***********
nblock,3
(1i9,3e20.9e3)
        1    3.600000000E+000    4.000000000E-001    4.400000000E+000
        2    3.600000000E+000    4.000000000E-001    4.800000000E+000
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-1
/com,*********** Elements for Body 1 "Solid1" ***********
et,1,186
keyo,1,2,1          ! set full integration on SOLID186
eblock,19,solid,,4000
(19i9)
        1        1        1        1        0        0        0        0       20        0     1001     4962     9441     9424     9375     8471     9514     9423     9422
     9928    22846    22788     9927    20932    22844    22842    20931     9926    22888    22843    22787
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-1
/com,*********** Elements for Body 2 "Solid2" ***********
et,2,186
keyo,2,2,1          ! set full integration on SOLID186
eblock,19,solid,,1000
(19i9)
        2        2        2        2        0        0        0        0       20        0        1        1     1214     1233     1242      810     1231     1232     1323
     1336     4757     4785     1337     3940     4781     4783     3941     1335     4756     4782     4803
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-1
/com,*********** Send User Defined Coordinate System(s) ***********
csys,0
toffst,273.15,  ! Temperature offset from absolute zero
/com,*********** Set Reference Temperature ***********
tref,22.
/com,*********** Send Materials ***********
MP,DENS,1,2770,	! kg m^-3
MP,ALPX,1,2.3e-05,	! C^-1
MP,C,1,875,	! J kg^-1 C^-1
MPTEMP,,,,,,,,
MPTEMP,1,-100
MPTEMP,2,0
MPTEMP,3,100
MPTEMP,4,200
MPDATA,KXX,1, ,114,144,165,175,	! W m^-1 C^-1
MPTEMP,,,,,,,,
MPTEMP,,,,,,,,
MPTEMP,1,0
MPTEMP,2,20
MPTEMP,3,100
MPDATA,RSVX,1, ,2.43e-08,2.67e-08,3.63e-08,	! kg m^3 A^-2 s^-3
MPTEMP,,,,,,,,
MP,EX,1,71000000000,	! Pa
MP,NUXY,1,0.33,
MP,MURX,1,1,

MP,DENS,2,2770,	! kg m^-3
MP,ALPX,2,2.3e-05,	! C^-1
MP,C,2,875,	! J kg^-1 C^-1
MPTEMP,,,,,,,,
MPTEMP,1,-100
MPTEMP,2,0
MPTEMP,3,100
MPTEMP,4,200
MPDATA,KXX,2, ,114,144,165,175,	! W m^-1 C^-1
MPTEMP,,,,,,,,
MPTEMP,,,,,,,,
MPTEMP,1,0
MPTEMP,2,20
MPTEMP,3,100
MPDATA,RSVX,2, ,2.43e-08,2.67e-08,3.63e-08,	! kg m^3 A^-2 s^-3
MPTEMP,,,,,,,,
MP,EX,2,71000000000,	! Pa
MP,NUXY,2,0.33,
MP,MURX,2,1,

!************************* Model Summary ********************
!Solid1,	Aluminum Alloy,	matid,	1
!Solid2,	Aluminum Alloy,	matid,	2
!************************* End Model Summary ********************
/com,*********** Create Contact "Frictional - Solid2 To Solid1" ***********
*set,tid,4
*set,cid,3
r,tid
r,cid
et,tid,170
et,cid,174
eblock,10,,,100
(15i9)
     5001        4        4        4        0     1323      810     1231     1232     3941     3940     4781     4783
     5002        4        4        4        0      810      801     1230     1231     3921     3922     4780     3940
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-1
eblock,10,,,100
(15i9)
     5101        3        3        3        0     1323      810     1231     1232     3941     3940     4781     4783
     5102        3        3        3        0      810      801     1230     1231     3921     3922     4780     3940
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-1
eblock,10,,,400
(15i9)
     5201        3        4        3        0     8871     8472     8873     8872    20935    20936    21782    21780
     5202        3        4        3        0     8870     8511     8472     8871    21053    20934    20935    21778
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-1
eblock,10,,,400
(15i9)
     5601        4        3        4        0     8871     8472     8873     8872    20935    20936    21782    21780
     5602        4        3        4        0     8870     8511     8472     8871    21053    20934    20935    21778
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-1
keyo,cid,8,2               ! auto create asymmetric contact (from Program Controlled setting)
keyo,cid,10,2              ! adjust contact stiffness each NR iteration (from Program Controlled setting)
keyo,cid,12,0              ! standard contact
mp,mu,cid,0.2	! unitless
keyo,cid,2,0               ! augmented Lagrange (from Program Controlled setting)
keyo,cid,4,0               ! on Gauss point (from Program Controlled setting)
keyo,cid,9,0               ! use real geometry with stepped effects
keyo,cid,7,0               ! No Prediction
rmod,tid,3,1.	! FKN
rmod,tid,5,0.	! ICONT
rmod,tid,6,0.	! PINB
rmod,tid,10,0.	! CNOF
rmod,tid,12,0.	! FKT
rmod,tid,36,36	! WB DSID
rmod,cid,3,1.	! FKN
rmod,cid,5,0.	! ICONT
rmod,cid,6,0.	! PINB
rmod,cid,10,0.	! CNOF
rmod,cid,12,0.	! FKT
rmod,cid,36,36	! WB DSID
nsel,all
esel,all
/com,*********** Fixed Supports ***********
CMBLOCK,_FIXEDSU,NODE,     1301
(8i10)
      8121      8122      8123      8124      8125      8126      8127      8128
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cmsel,s,_FIXEDSU
d,all,all
nsel,all
nsel,all
/com,*********** Create Displacement Tables and Functions ******

*DIM,_loadvari48xp,TABLE,2,1,1,TIME,
! Time values
_loadvari48xp(1,0,1) = 0.
_loadvari48xp(2,0,1) = 1.
! Load values
_loadvari48xp(1,1,1) = 0.
_loadvari48xp(2,1,1) = 1.5e-002


*DIM,_loadvari48xn,TABLE,2,1,1,TIME,
! Time values
_loadvari48xn(1,0,1) = 0.
_loadvari48xn(2,0,1) = 1.
! Load values
_loadvari48xn(1,1,1) = -0.
_loadvari48xn(2,1,1) = -1.5e-002

fini
/com,****************************************************************************
/com,*************************    SOLUTION       ********************************
/com,****************************************************************************
/solu
antype,4                   ! transient analysis
nlgeom,on                  ! Turn on Large Deformation Effects
kbc,1                      ! stepped BC's
eqsl,pcg,1e-8,,,,,,1
cntr,print,1               ! print out contact info and also make no initial contact an error
trnopt,full,,,,,hht        ! HHT time integration method
tintp,0.1	! Numerical Damping
nldiag,cont,iter           ! print out contact info each equilibrium iteration
resc,define,last,last,,dele	   ! Program Controlled
/com,****************************************************
/com,******************* SOLVE FOR LS 1 ****************
/com,*********** Create Acceleration ***********

*DIM,_acelx,TABLE,1,1,1,TIME,
! Time values
_acelx(1,0,1) = 1.
! Load values
_acelx(1,1,1) = 0.


*DIM,_acely,TABLE,1,1,1,TIME,
! Time values
_acely(1,0,1) = 1.
! Load values
_acely(1,1,1) = 0.


*DIM,_acelz,TABLE,1,1,1,TIME,
! Time values
_acelz(1,0,1) = 1.
! Load values
_acelz(1,1,1) = 9.80665

acel,%_acelx%,%_acely%,%_acelz%
/com,*** Set Displacements ***
CMBLOCK,_CM48UX_XP,NODE,      341
(8i10)
       921       922       923       924       925       926       927       928
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cmsel,s,_CM48UX_XP
d,all,ux,%_loadvari48xp%
nsel,all
autots,on                   ! User turned on automatic time stepping
deltim,0.01,0.001,0.05,OFF
time,1.
timint,on                  ! Turn on time integration effects
outres,erase
outres,all,none
outres,nsol,all
outres,rsol,all
outres,strs,all
outres,epel,all
outres,eppl,all
outres,v,all
outres,a,all
stabilize,off                   ! Stabilization turned OFF by user
! *********** WB SOLVE COMMAND ***********
! check interactive state
*get,ANSINTER_,active,,int
*if,ANSINTER_,ne,0,then
/eof
*endif
solve
/com *************** Write FE CONNECTORS *********
CEWRITE,file,ce,,INTE
/com,****************************************************
/com,*************** FINISHED SOLVE FOR LS 1 *************
*set,_DS_PROGRESS          ! turn off progress updates to avoid virus scanning bug
*get,_PCGITER,active,,solu,cgiter
/post1
fini
